OpenVSP model (file version 5), 15 components.
Geometry view with OpenVSP parameter names; values to 6 digits, angles in degrees, lengths in the model's unit.
Overall bounding box: X_Min=-140.072 X_Len=460.072 Y_Min=-295.27 Y_Len=590.54 Z_Min=-38.3016 Z_Len=128.383

Human "Pax"
  location (X Y Z) -60 20 -3.68116, rotation 0 0 0
  symmetric about XZ
  mass: Density=0.0180896 Shell_Flag=0 Mass_Area=1 Mass_Prior=0
  Anthropometric: Age=30 AutoDensity=1 BMI=27.7 BMI_pct=0.5 GenderFlag=0 LenUnit=3 Mass=98.0071 MassUnit=1 SitFrac=0.51 Stature=74.0551 Stature_pct=0.95 Volume=5417.86

Human "BackPax", child of "Pax"
  location (X Y Z) 20 15 2, rotation 0 0 0
  symmetric about XZ
  mass: Density=0.0180896 Shell_Flag=0 Mass_Area=1 Mass_Prior=0
  Anthropometric: Age=30 AutoDensity=1 BMI=27.7 BMI_pct=0.5 GenderFlag=0 LenUnit=3 Mass=98.0071 MassUnit=1 SitFrac=0.51 Stature=74.0551 Stature_pct=0.95 Volume=5417.86

Human "Pax", child of "Pax"
  location (X Y Z) -35 20 2, rotation 0 0 180
  symmetric about XZ
  mass: Density=0.0180896 Shell_Flag=0 Mass_Area=1 Mass_Prior=0
  Anthropometric: Age=30 AutoDensity=1 BMI=27.7 BMI_pct=0.5 GenderFlag=0 LenUnit=3 Mass=98.0071 MassUnit=1 SitFrac=0.51 Stature=74.0551 Stature_pct=0.95 Volume=5417.86

Wing "VStab"
  location (X Y Z) 286 90 50, rotation 90 0 0
  symmetric about XZ
  bounding box size 33.546 3.35655 75.4785
  totals: TotalSpan=75.4785 TotalProjectedSpan=75.4785 TotalChord=25.1595 TotalArea=1899 TotalAR=3
  root: chord 33.546, twist 0, NACA 4-series Camber=0 CamberLoc=0.2 ThickChord=0.1
  sections:
    n  Span     Root_Chord  Tip_Chord  Area   Sweep  Sweep_Location  Dihedral  Twist  Twist_Location  tip airfoil
    1  37.7392  33.546      16.773     949.5  0      1               0         0      0.25            as above

Wing "VStab", child of "VStab"
  location (X Y Z) 286 -90 50, rotation 90 0 0
  symmetric about XZ
  bounding box size 33.546 3.35655 75.4785
  totals: TotalSpan=75.4785 TotalProjectedSpan=75.4785 TotalChord=25.1595 TotalArea=1899 TotalAR=3
  root: chord 33.546, twist 0, NACA 4-series Camber=0 CamberLoc=0.2 ThickChord=0.1
  sections:
    n  Span     Root_Chord  Tip_Chord  Area   Sweep  Sweep_Location  Dihedral  Twist  Twist_Location  tip airfoil
    1  37.7392  33.546      16.773     949.5  0      1               0         0      0.25            as above

Wing "MainWing"
  location (X Y Z) -30 0 45, rotation 0 0 0
  symmetric about XZ
  bounding box size 61.758 590.54 6.17939
  totals: TotalSpan=590.54 TotalProjectedSpan=590.54 TotalChord=52.4943 TotalArea=31000 TotalAR=11.2496
  root: chord 61.758, twist 0, NACA 4-series Camber=0 CamberLoc=0.2 ThickChord=0.1
  sections:
    n  Span    Root_Chord  Tip_Chord  Area   Sweep  Sweep_Location  Dihedral  Twist  Twist_Location  tip airfoil
    1  295.27  61.758      43.2306    15500  0      0               0         0      0.25            as above
  SS_Control "Flaps": UStart=0.390244 UEnd=0.560976 Length_C_Start=0.445122 Length_C_End=0.445122 Length_Start=26.0818 Length_End=21.8578 LE_Flag=0 Surf_Type=2
  SS_Control "Ailerons": UStart=0.567073 UEnd=0.652439 Length_C_Start=0.426829 Length_C_End=0.426829 Length_Start=20.8149 Length_End=18.7896 LE_Flag=0 Surf_Type=2
  SS_Control "Slats": UStart=0.390244 UEnd=0.560976 Length_C_Start=0.176829 Length_C_End=0.176829 Length_Start=10.3613 Length_End=8.68323 LE_Flag=1 Surf_Type=2

Pod "Tailbooms"
  location (X Y Z) -50 -90 50, rotation 0 0 0
  symmetric about XZ
  bounding box size 370 193.455 13.4545
  Design: FineRatio=55 Length=370

Wing "HStab"
  location (X Y Z) 286 0 50, rotation 0 0 0
  symmetric about XZ
  bounding box size 30.7 180 3.07178
  totals: TotalSpan=180 TotalProjectedSpan=180 TotalChord=30.7 TotalArea=5526 TotalAR=5.86319
  root: chord 30.7, twist 0, NACA 4-series Camber=0 CamberLoc=0.2 ThickChord=0.1
  sections:
    n  Span  Root_Chord  Tip_Chord  Area  Sweep  Sweep_Location  Dihedral  Twist  Twist_Location  tip airfoil
    1  90    30.7        30.7       2763  0      0               0         0      0.25            as above

Propeller "CTOL"
  location (X Y Z) -50 -90 45, rotation 0 0 0
  symmetric about XZ
  bounding box size 4.44094 270 90.0811
  Design: Diameter=90 NumBlade=3 Beta34=20 UseBeta34Flag=1 Feather=0 Rotate=30 Precone=0 ReverseFlag=0 FoldAngle=0 PropMode=1 AF=152.391 CLi=0.540497 Chord=0.174284 Solidity=0.166429 ConstructXoC=0.5 FeatherAxisXoC=0.5 FeatherOffsetXoC=0
  cross sections:
    n  RadiusFrac  shape
    0  0.0392857   ellipse Ellipse_Height=1.8 Ellipse_Width=3.6
    1  0.4         NACA 16-series Chord=8.20249 IdealCl=0.7 ThickChord=0.144074
    2  1           NACA 16-series Chord=5.85 IdealCl=0.2 ThickChord=0.03
  Chord along r/R (cubic Bezier): 0.0392857: 0.08, 0.22619: 0.15, 0.413095: 0.2, 0.6: 0.2, 0.716667: 0.2, 0.833333: 0.2, 0.95: 0.2, 0.966667: 0.2, 0.983333: 0.2, 1: 0.13
  Twist along r/R (PCHIP): 0.0392857: 46.75, 0.75: 20, 1: 13
  Thick along r/R (cubic Bezier): 0.0392857: 0.5, 0.12619: 0.3, 0.213095: 0.225, 0.3: 0.2, 0.4: 0.125, 0.5: 0.115, 0.6: 0.1, 0.733333: 0.075, 0.866667: 0.055, 1: 0.03
  CLI along r/R (cubic Bezier): 0.0392857: 0, 0.159524: 0.7, 0.279762: 0.7, 0.4: 0.7, 0.466667: 0.7, 0.533333: 0.7, 0.6: 0.7, 0.733333: 0.7, 0.866667: 0.7, 1: 0.2

Propeller "VTOL"
  location (X Y Z) 120 -90 60, rotation 0 90 0
  symmetric about XZ
  bounding box size 80 260.144 3.95433
  Design: Diameter=80 NumBlade=2 Beta34=20 UseBeta34Flag=1 Feather=0 Rotate=0 Precone=0 ReverseFlag=0 FoldAngle=0 PropMode=1 AF=151.239 CLi=0.534467 Chord=0.1747 Solidity=0.111217 ConstructXoC=0.5 FeatherAxisXoC=0.5 FeatherOffsetXoC=0
  cross sections:
    n  RadiusFrac  shape
    0  0.0625      ellipse Ellipse_Height=1.6 Ellipse_Width=3.2
    1  0.4         NACA 16-series Chord=7.2311 IdealCl=0.7 ThickChord=0.150515
    2  1           NACA 16-series Chord=5.2 IdealCl=0.2 ThickChord=0.03
  Chord along r/R (cubic Bezier): 0.0625: 0.08, 0.241667: 0.15, 0.420833: 0.2, 0.6: 0.2, 0.716667: 0.2, 0.833333: 0.2, 0.95: 0.2, 0.966667: 0.2, 0.983333: 0.2, 1: 0.13
  Twist along r/R (PCHIP): 0.0625: 46.75, 0.75: 20, 1: 13
  Thick along r/R (cubic Bezier): 0.0625: 0.5, 0.148843: 0.3, 0.235186: 0.225, 0.321529: 0.2, 0.414352: 0.125, 0.507176: 0.115, 0.6: 0.1, 0.733333: 0.075, 0.866667: 0.055, 1: 0.03
  CLI along r/R (cubic Bezier): 0.0625: 0, 0.175: 0.7, 0.2875: 0.7, 0.4: 0.7, 0.466667: 0.7, 0.533333: 0.7, 0.6: 0.7, 0.733333: 0.7, 0.866667: 0.7, 1: 0.2

Propeller "VTOL", child of "VTOL"
  location (X Y Z) 100 -180 60, rotation 0 90 0
  symmetric about XZ, YZ
  bounding box size 280.144 440 3.95433
  Design: Diameter=80 NumBlade=2 Beta34=20 UseBeta34Flag=1 Feather=0 Rotate=90 Precone=0 ReverseFlag=0 FoldAngle=0 PropMode=1 AF=151.239 CLi=0.534467 Chord=0.1747 Solidity=0.111217 ConstructXoC=0.5 FeatherAxisXoC=0.5 FeatherOffsetXoC=0
  cross sections:
    n  RadiusFrac  shape
    0  0.0625      ellipse Ellipse_Height=1.6 Ellipse_Width=3.2
    1  0.4         NACA 16-series Chord=7.2311 IdealCl=0.7 ThickChord=0.150515
    2  1           NACA 16-series Chord=5.2 IdealCl=0.2 ThickChord=0.03
  blade curves as in "VTOL"

Pod "MotorMounts"
  location (X Y Z) -120 180 50, rotation 0 0 0
  symmetric about XZ
  bounding box size 242 368.8 8.8
  Design: FineRatio=55 Length=242

Propeller "PropGeom"
  location (X Y Z) -50 90 50, rotation 0 0 0
  bounding box size 4.96969 100.18 9.70814
  Design: Diameter=100 NumBlade=2 Beta34=20 UseBeta34Flag=1 Feather=0 Rotate=0 Precone=0 ReverseFlag=0 FoldAngle=0 PropMode=0 AF=151.538 CLi=0.538798 Chord=0.177656 Solidity=0.113099 ConstructXoC=0.5 FeatherAxisXoC=0.5 FeatherOffsetXoC=0
  cross sections:
    n  RadiusFrac  shape
    0  0.2         ellipse Ellipse_Height=2 Ellipse_Width=4
    1  0.4         NACA 16-series Chord=8.3125 IdealCl=0.7 ThickChord=0.144074
    2  1           NACA 16-series Chord=6.5 IdealCl=0.2 ThickChord=0.03
  Chord along r/R (cubic Bezier): 0.2: 0.08, 0.333333: 0.15, 0.466667: 0.2, 0.6: 0.2, 0.716667: 0.2, 0.833333: 0.2, 0.95: 0.2, 0.966667: 0.2, 0.983333: 0.2, 1: 0.13
  Twist along r/R (PCHIP): 0.2: 46.75, 0.75: 20, 1: 13
  Thick along r/R (cubic Bezier): 0.2: 0.5, 0.233333: 0.3, 0.266667: 0.225, 0.3: 0.2, 0.4: 0.125, 0.5: 0.115, 0.6: 0.1, 0.733333: 0.075, 0.866667: 0.055, 1: 0.03
  CLI along r/R (cubic Bezier): 0.2: 0, 0.266667: 0.7, 0.333333: 0.7, 0.4: 0.7, 0.466667: 0.7, 0.533333: 0.7, 0.6: 0.7, 0.733333: 0.7, 0.866667: 0.7, 1: 0.2

Propeller "PropGeom"
  location (X Y Z) -50 -90 50, rotation 0 0 0
  bounding box size 4.96969 100.18 9.70814
  Design: Diameter=100 NumBlade=2 Beta34=20 UseBeta34Flag=1 Feather=0 Rotate=0 Precone=0 ReverseFlag=0 FoldAngle=0 PropMode=0 AF=151.538 CLi=0.538798 Chord=0.177656 Solidity=0.113099 ConstructXoC=0.5 FeatherAxisXoC=0.5 FeatherOffsetXoC=0
  cross sections:
    n  RadiusFrac  shape
    0  0.2         ellipse Ellipse_Height=2 Ellipse_Width=4
    1  0.4         NACA 16-series Chord=8.3125 IdealCl=0.7 ThickChord=0.144074
    2  1           NACA 16-series Chord=6.5 IdealCl=0.2 ThickChord=0.03
  blade curves as in "PropGeom"

Fuselage "Fuselage"
  location (X Y Z) -140 0 11.8841, rotation 0 0 0
  bounding box size 296 80 84.5269
  Design: Length=296
  cross sections:
    n  XLocPercent  YLocPercent  ZLocPercent  shape
    0  0            0            -0.085       point
    1  0.00729982   0            -0.085       circle Circle_Diameter=6.5
    2  0.0790098    0            -0.085       circle Circle_Diameter=40
    3  0.169044     0            -0.0641892   rounded rectangle RoundRectXSec_Radius=10 RoundedRect_Height=60 RoundedRect_Width=65
    4  0.369525     0            -0.0254237   rounded rectangle RoundRectXSec_Radius=30 RoundedRect_Height=80.3514 RoundedRect_Width=80
    5  0.499145     0            -0.0254237   rounded rectangle RoundRectXSec_Radius=35 RoundedRect_Height=80 RoundedRect_Width=75
    6  0.718777     0            0.0288462    ellipse Ellipse_Height=50 Ellipse_Width=50
    7  0.845633     0            0.0635593    ellipse Ellipse_Height=30 Ellipse_Width=30
    8  1            0            0.105932     circle Circle_Diameter=5.9706

VSPAERO settings: Sref=8058.85 bref=308.657 cref=20.6535 Xcg=0 Ycg=0 Zcg=0 AlphaStart=0 AlphaEnd=10 AlphaNpts=3 BetaStart=0 BetaEnd=0 BetaNpts=1 MachStart=0 MachEnd=0 MachNpts=1 ReCref=1e+07 Vinf=100 Rho=0.002377
